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Xd := 6
Xc := 6
Xa := 4
Xb := 4
Yd := 3
Yc := 7
Ya := 2
Yb := 8
X := transpose([Xa, Xb, Xc, Xd, Xa])
Y := transpose([Ya, Yb, Yc, Yd, Ya])
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[a; b] := line([Xd; Xa], [Yd; Ya]) = [0; 0.5]
[v; d] := line([Xb; Xc], [Yb; Yc]) = [10; -0.5]
Fbc(x) := v + d*x
Fad(x) := a + b*x
Xp := (v - a)/(b - d) = 10
Yp := Fad(Xp) = 5
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Ts(dx, dy) := [1, 0, -dx; 0, 1, -dy; 0, 0, 1]
Rs(α) := [cos(α), -sin(α), 0; sin(α), cos(α), 0; 0, 0, 1]
Pc := [Xa, Xb, Xc, Xd, Xa; Ya, Yb, Yc, Yd, Ya; 1, 1, 1, 1, 1] = [4, 4, 6, 6, 4; 2, 8, 7, 3, 2; 1, 1, 1, 1, 1]
P1 := Ts(Xp, Yp)*Pc = [-6, -6, -4, -4, -6; -3, 3, 2, -2, -3; 1, 1, 1, 1, 1]
Xp1 := transpose(P1)[:, 0] = [-6; -6; -4; -4; -6]
Yp1 := transpose(P1)[:, 1] = [-3; 3; 2; -2; -3]
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P2 := Rs(-90 °)*P1 = [-3, 3, 2, -2, -3; 6, 6, 4, 4, 6; 1, 1, 1, 1, 1]
Xp2 := transpose(P2)[:, 0] = [-3; 3; 2; -2; -3]
Yp2 := transpose(P2)[:, 1] = [6; 6; 4; 4; 6]
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P3 := Ts(-Xp, -Yp)*P2 = [7, 13, 12, 8, 7; 11, 11, 9, 9, 11; 1, 1, 1, 1, 1]
Xp3 := transpose(P3)[:, 0] = [7; 13; 12; 8; 7]
Yp3 := transpose(P3)[:, 1] = [11; 11; 9; 9; 11]
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