PIR := [3, 0, 0, 1, 0, 0; 0, 0, 3, 0, 0, 1; 0, 0, 0, 3, 3, 3; 1, 1, 1, 1, 1, 1]
rv := 10
φ := 315 ° = 5.49779
θ := 45 ° = 0.785398
φv := 315/180*π = 5.49779
θv := 45/180*π = 0.785398
xwl := 200
ywl := 100
xwh := 700
ywh := 500
Kview := [
    -sin(φv), cos(φv), 0, 0;
    -cos(θv)*cos(φv), -cos(θv)*sin(φv), sin(θv), 0;
    -sin(θv)*cos(φv), -sin(θv)*sin(φv), -cos(θv), rv;
    0, 0, 0, 1
] = [0.707107, 0.707107, 0, 0; -0.5, 0.5, 0.707107, 0; -0.5, 0.5, -0.707107, 10; 0, 0, 0, 1]
PIR_V := Kview*PIR = [
    2.12132, 0, 2.12132, 0.707107, 0, 0.707107;
    -1.5, 0, 1.5, 1.62132, 2.12132, 2.62132;
    8.5, 10, 11.5, 7.37868, 7.87868, 8.37868;
    1, 1, 1, 1, 1, 1
]
xl := min(transpose(PIR_V)[:, 0]) = 0
xh := max(transpose(PIR_V)[:, 0]) = 2.12132
yl := min(transpose(PIR_V)[:, 1]) = -1.5
yh := max(transpose(PIR_V)[:, 1]) = 2.62132
Δxw := xwh - xwl = 500
Δyw := ywh - ywl = 400
Δx := xh - xl = 2.12132
Δy := yh - yl = 4.12132
kx := Δxw/Δx = 235.702
ky := Δyw/Δy = 97.0563
Tsw := [kx, 0, xwl - kx*xl; 0, -ky, ywh + ky*yl; 0, 0, 1] = [235.702, 0, 200; 0, -97.0563, 354.416; 0, 0, 1]
Pxy := stack(transpose(transpose(PIR_V)[:, 0]), transpose(transpose(PIR_V)[:, 1]), transpose(transpose(PIR_V)[:, 3])) = [
    2.12132, 0, 2.12132, 0.707107, 0, 0.707107;
    -1.5, 0, 1.5, 1.62132, 2.12132, 2.62132;
    1, 1, 1, 1, 1, 1
]
Mw := Tsw*Pxy = [
    700, 200, 700, 366.667, 200, 366.667;
    500, 354.416, 208.831, 197.056, 148.528, 100;
    1, 1, 1, 1, 1, 1
]
X := transpose([Mw[0, 0], Mw[0, 1], Mw[0, 2], Mw[0, 0], Mw[0, 3], Mw[0, 4], Mw[0, 5], Mw[0, 3], Mw[0, 4], Mw[0, 1], Mw[0, 2], Mw[0, 5]])
Y := transpose([Mw[1, 0], Mw[1, 1], Mw[1, 2], Mw[1, 0], Mw[1, 3], Mw[1, 4], Mw[1, 5], Mw[1, 3], Mw[1, 4], Mw[1, 1], Mw[1, 2], Mw[1, 5]])
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Rc := [rv*sin(θv)*cos(φv); rv*sin(θv)*sin(φv); rv*sin(θv)]
AA1 := [PIR[0, 3]; PIR[1, 3]; PIR[2, 3]] - [PIR[0, 0]; PIR[1, 0]; PIR[2, 0]] = [-2; 0; 3]
AB := [PIR[0, 1]; PIR[1, 1]; PIR[2, 1]] - [PIR[0, 0]; PIR[1, 0]; PIR[2, 0]] = [-3; 0; 0]
Nabb1a1 := AA1×AB = [0; -9; 0]
AC := [PIR[0, 2]; PIR[1, 2]; PIR[2, 2]] - [PIR[0, 0]; PIR[1, 0]; PIR[2, 0]] = [-3; 3; 0]
Naa1c1c := AC×AA1 = [9; 9; 6]
CC1 := [PIR[0, 5]; PIR[1, 5]; PIR[2, 5]] - [PIR[0, 2]; PIR[1, 2]; PIR[2, 2]] = [0; -2; 3]
BC := [PIR[0, 2]; PIR[1, 2]; PIR[2, 2]] - [PIR[0, 1]; PIR[1, 1]; PIR[2, 1]] = [0; 3; 0]
BB1 := [PIR[0, 4]; PIR[1, 4]; PIR[2, 4]] - [PIR[0, 1]; PIR[1, 1]; PIR[2, 1]] = [0; 0; 3]
Nbcc1b1 := CC1×BC = [-9; 0; 0]
(Rc*Nabb1a1) ≥ 0 = 1
(Rc*Naa1c1c) ≥ 0 = 1
(Rc*Nbcc1b1) ≥ 0 = 0
-Не*видима
X1 := transpose([Mw[0, 0], Mw[0, 3], Mw[0, 4], Mw[0, 3], Mw[0, 5], Mw[0, 2], Mw[0, 0], Mw[0, 1], Mw[0, 4], Mw[0, 5]])
Y1 := transpose([Mw[1, 0], Mw[1, 3], Mw[1, 4], Mw[1, 3], Mw[1, 5], Mw[1, 2], Mw[1, 0], Mw[1, 1], Mw[1, 4], Mw[1, 5]])
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ϕ := 50 ° = 0.872665
ϕ := 50/180*π = 0.872665
N := [0, sin(ϕ), cos(ϕ)] = [0, 0.766044, 0.642788]
Nv := transpose(N) = [0; 0.766044; 0.642788]
x0 := 0
y0 := 0
z0 := 3/4*PIR[:, 4][2] = 2.25
Dv := -(Nv[0]*x0 + Nv[1]*y0 + Nv[2]*z0) = -1.44627
tAA1 := -((Nv[0]*PIR[0, 0] + Nv[1]*PIR[1, 0] + Nv[2]*PIR[2, 0] + Dv)/(Nv[0]*AA1[0] + Nv[1]*AA1[1] + Nv[2]*AA1[2])) = 0.75
xAA1 := PIR[0, 0] + tAA1*AA1[0] = 1.5
yAA1 := PIR[1, 0] + tAA1*AA1[1] = 0
zAA1 := PIR[2, 0] + tAA1*AA1[2] = 2.25
tCC1 := -((Nv[0]*PIR[0, 2] + Nv[1]*PIR[1, 2] + Nv[2]*PIR[2, 2] + Dv)/(Nv[0]*CC1[0] + Nv[1]*CC1[1] + Nv[2]*CC1[2])) = -2.14968
xCC1 := PIR[0, 2] + tCC1*CC1[0] = 0
yCC1 := PIR[1, 2] + tCC1*CC1[1] = 7.29936
zCC1 := PIR[2, 2] + tCC1*CC1[2] = -6.44903
tBB1 := -((Nv[0]*PIR[0, 1] + Nv[1]*PIR[1, 1] + Nv[2]*PIR[2, 1] + Dv)/(Nv[0]*BB1[0] + Nv[1]*BB1[1] + Nv[2]*BB1[2])) = 0.75
xBB1 := PIR[0, 1] + tBB1*BB1[0] = 0
yBB1 := PIR[1, 1] + tBB1*BB1[1] = 0
zBB1 := PIR[2, 1] + tBB1*BB1[2] = 2.25
tBC := -((Nv[0]*PIR[0, 1] + Nv[1]*PIR[1, 1] + Nv[2]*PIR[2, 1] + Dv)/(Nv[0]*BC[0] + Nv[1]*BC[1] + Nv[2]*BC[2])) = 0.629325
xBC := PIR[0, 1] + tBC*BC[0] = 0
yBC := PIR[1, 1] + tBC*BC[1] = 1.88797
zBC := PIR[2, 1] + tBC*BC[2] = 0
tAC := -((Nv[0]*PIR[0, 0] + Nv[1]*PIR[1, 0] + Nv[2]*PIR[2, 0] + Dv)/(Nv[0]*AC[0] + Nv[1]*AC[1] + Nv[2]*AC[2])) = 0.629325
xAC := PIR[0, 0] + tAC*AC[0] = 1.11203
yAC := PIR[1, 0] + tAC*AC[1] = 1.88797
zAC := PIR[2, 0] + tAC*AC[2] = 0
TR := [xAA1, xBB1, xAC, xBC; yAA1, yBB1, yAC, yBC; zAA1, zBB1, yBB1, zBC; 1, 1, 1, 1] = [1.5, 0, 1.11203, 0; 0, 0, 1.88797, 1.88797; 2.25, 2.25, 0, 0; 1, 1, 1, 1]
TR_V := Kview*TR = [
    1.06066, 0, 2.12132, 1.335;
    0.84099, 1.59099, 0.387974, 0.943987;
    7.65901, 8.40901, 10.388, 10.944;
    1, 1, 1, 1
]
TRxy := stack(transpose(transpose(TR_V)[:, 0]), transpose(transpose(TR_V)[:, 1]), transpose(transpose(TR_V)[:, 3])) = [1.06066, 0, 2.12132, 1.335; 0.84099, 1.59099, 0.387974, 0.943987; 1, 1, 1, 1]
TRw := Tsw*TRxy = [450, 200, 700, 514.662; 272.792, 200, 316.76, 262.796; 1, 1, 1, 1]
XC := transpose([TRw[0, 0], TRw[0, 1], TRw[0, 3], TRw[0, 2], TRw[0, 0]])
YC := transpose([TRw[1, 0], TRw[1, 1], TRw[1, 3], TRw[1, 2], TRw[1, 0]])
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