x := 2  # 1 Задание
n := 9
y := (sqrt(x^3 + n) + cos(|n*x - 1|)^2)/(nthroot(x^5 + sin(x) + n, 4)*cos(π/4*(x + n))) = -2.33381
# 2 Задание
x := 7
y := 10
z := -3
p := if(x > y, sin(x) + 3*|y| - z^2, (y + 3)/sqrt(z^2 + 1)*ln(|x + 1|))
p = 8.5485
q := if(x > y and x < 1, cos(x) + 2*|y + 1| - z, (x*y + 3)/sqrt(y^2 + 5))
q = 7.12407
w := if(x < y or y ≥ 10, x^2 + 2*(y*x + 1) - z, (x^-3*y^2 + 3)*sqrt(z^2 + 7))
w = 194
# 3 Задание
Δx := 0.4
n := 3
x := -2, -1.6 .. 2
f(x) := (x^2 - n*x + sin(x))*sqrt(|x - cos(n*x)|)
f(x) = [15.6407; 8.26243; 2.26215; 0.581154; 0.847445; 0; -0.126223; -1.29279; -1.77811; -1.52552; -1.11221]
# 4 Задание
n := 5
a := -3*n
a = -15
b := 3*n
b = 15
B := round(runif(3, a, b))
A := round(runif(3, a, b))
C := round(runif(3, a, b))
B = [-15; -9; 3]
A = [-4; 10; -10]
C = [6; -6; -12]
s := A[0]*B[0] + A[1]*B[1] + A[2]*B[2] = -60
s := vectorize(A)*vectorize(B) = -60
vectorize(V) := vectorize(B)×vectorize(C) = [126; -162; 144]
vectorize(V) := [B[1]*C[2] - B[2]*C[1]; B[2]*C[0] - B[0]*C[2]; B[0]*C[1] - B[1]*C[0]] = [126; -162; 144]
w := (vectorize(A)×vectorize(B))*vectorize(C) = -3564
buf := [A[1]*B[2] - A[2]*B[1]; A[2]*B[0] - A[0]*B[2]; A[0]*B[1] - A[1]*B[0]]
w := buf[0]*C[0] + buf[1]*C[1] + buf[2]*C[2] = -3564
res := if((|A| > |B|) and (|A| > |C|), "Это A", if((|B| > |A|) and (|B| > |C|), "Это B", "Это C")) = "Это B"
lenB := sqrt(B[0]^2 + B[1]^2 + B[2]^2) = 17.7482
lenA := sqrt(A[0]^2 + A[1]^2 + A[2]^2) = 14.6969
lenC := sqrt(C[0]^2 + C[1]^2 + C[2]^2) = 14.6969
size := 10
i := 0 .. size - 1
j := 0 .. size - 1
M[i, j] := round(-10 + rnd(20))
M = [
    -7, 10, -8, -10, 1, 2, -7, -1, -9, 6;
    0, 8, 9, 1, -1, 7, 6, 10, 2, -5;
    7, -2, 4, -10, -4, 2, 7, 0, 5, -1;
    5, 2, 5, 1, -7, -1, 0, 5, -7, 0;
    4, -7, -7, 4, -1, 9, -7, 6, -6, 6;
    -7, 5, -4, 4, 4, -8, 7, 0, -1, 9;
    1, -1, 7, -1, 10, 5, -6, 7, 0, -9;
    1, 1, 7, 3, 7, -8, -4, -4, -7, 7;
    2, -5, -10, 6, -6, 1, -8, 5, 1, -1;
    4, -1, 2, 3, 0, 4, -6, -6, -1, -8
]
sumM := sum(sum(M[i, j], j = 0 .. 9), i = 0 .. 9) = 27
sumP := sum(sum(if(M[i, j] > 0, M[i, j], 0), j = 0 .. 9), i = 0 .. 9) = 247
sumN := sum(sum(if(M[i, j] < 0, M[i, j], 0), j = 0 .. 9), i = 0 .. 9) = -220
X := M[:, 0]
Y := transpose(M)[:, size - 1]
dot := vectorize(X)*vectorize(Y) = -73
# Задание 5
x := -3*π .. 3*π
y(x) := exp(-|x|/3)*cos(x)
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# Задание 6
Δx := 0.25
x := -9, -8.75 .. 9
f(x) := if(x < 0, e^x*x^3, e^(-x)*x^3)
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# Задание 7
Δx := π/4
s := 0, 1 .. 15
x1 := -2*π
x2[s] := x1 + Δx*s
g(x2) := sqrt(|x2|)*sin(x2)
g(x2) = [0; 2.69879; 3.81667; 2.69879; 0; -2.69879; -3.81667; -2.69879; 0; 2.69879; 3.81667; 2.69879; 0; -2.69879; -3.81667; -2.69879]
x2 = [-6.28319; -5.49779; -4.71239; -3.92699; -3.14159; -2.35619; -1.5708; -0.785398; 0; 0.785398; 1.5708; 2.35619; 3.14159; 3.92699; 4.71239; 5.49779]
Y := g(x2)
X := x2
filename2 := "Y.txt"
filename1 := "X.txt"
WRITEPRN(filename2) := Y
WRITEPRN(filename1) := X
YY := READPRN(filename2)
XX := READPRN(filename1)
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# Задание 8
x := -3 .. 3
q(x) := e^(-x^2)
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# Задание 9
Δx := 30/43
x := -15, -15 + Δx .. 15
y := -15, -15 + Δx .. 15
f(x, y) := sin(sqrt(x^2 + y^2))/sqrt(x^2 + y^2)
# [component: inputs f]
# Задание 10
x := -5 .. 5
f(x) := x^2 + (x - 2)*sin(x) - 5
root(f(x), x) = [-1.32936; -1.32936; -1.32936; -1.32936; -1.32936; -1.32936; 2.19967; 2.19967; 2.19967; 2.19967; 2.19967]
f(-1.329) = -0.00160155
f(2.2) = 0.00169928
# Задание 11
x := -4 .. 4
f(x) := x^2 + x*sin(2*x) - (x - 5)*cos(x)
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root(f(x), x, -2, -4) = -2.97354
root(f(x), x, 0, -2) = -1.93283
f(-2.974) = 0.00411823
f(-1.933) = -0.00110412
# Задание 12
n := 5
x^3 + (4 - n)*x^2 + (3 - 4*n)*x - 3*n
v := [-3*n; 3 - 4*n; 4 - n; 1]
polyroots(v) = [-3; -1; 5]
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# Задание 13
n := 5
V := [n, n + 1, n + 2; n - 3, n - 2, n; n - 1, n, n + 1]
P := [6*n + 8; 6*n - 7; 6*n + 2]
S := V^-1*P = [1; 2; 3]
Given
n*x + (n + 1)*y + (n + 2)*z == 6*n + 8
(n - 3)*x + (n - 2)*y + n*z == 6*n - 7
(n - 1)*x + n*y + (n + 1)*z == 6*n + 2
Find(x, y, z) → [1; 2; 3]
z := 3
x := 1
y := 2
n*x + (n + 1)*y + (n + 2)*z = 38
6*n + 8 = 38
6*n - 7 = 23
(n - 3)*x + (n - 2)*y + n*z = 23
6*n + 2 = 32
(n - 1)*x + n*y + (n + 1)*z = 32
# Задание 14
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Given
x^2/81 + y^2/16 - 1 == (x - 9)^2 + (y - 2)^2 - 25
Find(x, y) → [9/2, 549/40; 0, 0]
# Задание 15
x := 0 .. 10
f(x) := x*sin(x)
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x := 5
x := Minimize(f, x)
x = 4.91318
f(x) = -4.81447
x := 7
x := Maximize(f, x)
x = 7.97867
f(x) = 7.91673
x := 2
x := Maximize(f, x)
x = 2.02876
f(x) = 1.81971
