ya := -4
xa := -2
xb := -3
yb := 0
yc := 4
xc := 0
yd := 0
xd := 3
ye := -4
xe := 2
yf := 0
xf := -2
yh := 0
xh := 2
ywl := 200
xwl := 100
ywh := 500
xwh := 400
zy := transpose([ya, yb, yc, yd, ye, yf, yh])
zx := transpose([xa, xb, xc, xd, xe, xf, xh])
yH := max(zy) = 4
xL := min(zx) = -3
xH := max(zx)
yL := min(zy) = -4
ΔxW := xwh - xwl = 300
Δx := xH - xL = 6
Δyw := ywh - ywl = 300
Δy := yH - yL = 8
kx := ΔxW/Δx = 50
ky := Δyw/Δy = 37.5
Tsw := [kx, 0, xwl - kx*xL; 0, -ky, ywh + ky*yL; 0, 0, 1]
[xaw; yaw; q] := Tsw*[xa; ya; 1] = [150; 500; 1]
[xbw; ybw; q] := Tsw*[xb; yb; 1] = [100; 350; 1]
[xcw; ycw; q] := Tsw*[xc; yc; 1] = [250; 200; 1]
[xdw; ydw; q] := Tsw*[xd; yd; 1] = [400; 350; 1]
[xew; yew; q] := Tsw*[xe; ye; 1] = [350; 500; 1]
[xfw; yfw; q] := Tsw*[xf; yf; 1] = [150; 350; 1]
[xhw; yhw; q] := Tsw*[xh; yh; 1] = [350; 350; 1]
X := transpose([xf, xh, xe, xa, xf, xb, xc, xd, xh])
Xw := transpose([xfw, xhw, xew, xaw, xfw, xbw, xcw, xdw, xhw])
Y := transpose([yf, yh, ye, ya, yf, yb, yc, yd, yh])
Yw := transpose([yfw, yhw, yew, yaw, yfw, ybw, ycw, ydw, yhw])
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# Задание 2
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f(x) := sin(π*x)*sqrt(|x|)
x1 := -6
x2 := 6
Δx := 0.1
YLW := 200
XLW := 100
YHW := 900
XHW := 800
N := round((x2 - x1)/Δx) = 120
i := 0 .. N
X[i] := x1 + i*Δx
Y[i] := f(X[i])
Z[i] := 1
xL := min(X) = -6
yH := max(Y) = 2.34521
xH := max(X) = 6
yL := min(Y) = -2.34521
Ms := stack(transpose(X), transpose(Y), transpose(Z))
ΔxW := XHW - XLW = 700
Δx := xH - xL = 12
ΔyW := YHW - YLW = 700
Δy := yH - yL = 4.69042
ky := ΔyW/Δy = 149.241
kx := ΔxW/Δx = 58.3333
TSW := [kx, 0, XLW - kx*xL; 0, -ky, YHW + ky*yL; 0, 0, 1]
Mw := TSW*Ms
Xw := transpose(Mw)[:, 0]
Yw := transpose(Mw)[:, 1]
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