x := READPRN("C:\Users\litvi\Documents\BSTU\3\1\Основы компьютерной геометрии\lab11\lab11\Lab01\X_bez.txt")
y := READPRN("C:\Users\litvi\Documents\BSTU\3\1\Основы компьютерной геометрии\lab11\lab11\Lab01\Y_bez.txt")
xB := READPRN("C:\Users\litvi\Documents\BSTU\3\1\Основы компьютерной геометрии\lab11\lab11\Lab01\XB_bez.txt")
yB := READPRN("C:\Users\litvi\Documents\BSTU\3\1\Основы компьютерной геометрии\lab11\lab11\Lab01\YB_bez.txt")
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